// COMSOL Multiphysics 5.3.1.229 model "fifteen_spheres_in_slab.mph"
// Outline of the model tree

Parameters
  c0 = c_const
  lambda = 500[nm]
  fre = c0/lambda
  n_air = 1
  n_scatlay = 1.3
  n_glass = 1.5
  n_sphere = 2
  theta = 0[deg]
  phi = 270[deg]
  d_scatlay = 600[nm]

Variables
  var1 "Variables 1"
    k = ewfd.k0
    kx = k*sin(theta)*cos(phi)
    ky = k*sin(theta)*sin(phi)
    kz = k*cos(theta)
    kg = ewfd.k0 * n_glass
    kgx = kg*sin(theta)*cos(phi)
    kgy = kg*sin(theta)*sin(phi)
    kgz = kg*cos(theta)

Coordinate systems
  pml1: PML "PML Air" on domains 1
    wavelengthSourceType = userDefined
    typicalWavelength = 2 * pi / n_air / abs(ewfd.k0)
    PMLfactor = 1 / cos(theta)
  pml2: PML "PML Glass" on domains 5
    wavelengthSourceType = userDefined
    typicalWavelength = 2 * pi / n_glass / abs(ewfd.k0)
    PMLfactor = 1 / cos(theta)

Geometry
  geom1 "Geometry 1" (3D, length unit nm)
    blk1: Block
      base = center
      size = {1001, 1001, 8000}
      layername = {Layer 1, Layer 2, Layer 3, Layer 4}
      layer = {1000, 1500, 3000, 1500}
    sph1: Sphere | pos = {-200, -200, -500}; r = 150
    sph2: Sphere | pos = {200, 200, 500}; r = 100
    sph3: Sphere | pos = {0, 30, 0}; r = 120
    sph4: Sphere | pos = {-300, -200, 1200}; r = 110
    sph5: Sphere | pos = {110, 150, 1220}; r = 140
    sph6: Sphere | pos = {200, 0, -1110}; r = 120
    sph7: Sphere | pos = {-100, 380, -1100}; r = 100
    sph8: Sphere | pos = {200, -100, 400}; r = 100
    sph9: Sphere | pos = {-320, 300, 550}; r = 110
    sph10: Sphere | pos = {-360, -360, -1280}; r = 100
    sph11: Sphere | pos = {100, 300, -340}; r = 100
    sph12: Sphere | pos = {-150, 300, 860}; r = 120
    sph13: Sphere | pos = {-270, -300, 700}; r = 130
    sph14: Sphere | pos = {-170, -180, -30}; r = 100
    sph15: Sphere | pos = {340, -300, 0}; r = 100
    fin: Finalize "Form Union"

Materials
  mat1: Common "air" on domains 1, 2
    RefractiveIndex
      n = n_air
      ki = 0
  mat2: Common "sphere" on domains 6-20
    RefractiveIndex
      n = n_sphere
      ki = 0
  mat3: Common "scattering layer" on domains 3
    RefractiveIndex
      n = n_scatlay
      ki = 0
  mat4: Common "glass" on domains 4, 5
    RefractiveIndex
      n = n_glass
      ki = 0

Physics
  ewfd: ElectromagneticWavesFrequencyDomain on all domains
    dependent variable E2 = {E2x, E2y, E2z}
    wee1: WaveEquationElectric (default)
    pec1: PerfectElectricConductor (default)
    init1: init "Initial Values 1" (default)
    port2: Port "Input Port 1" on boundaries 6
      PortName = 1
      PortExcitation = on
      PortSlit = 1
      SlitType = DomainBacked
      PortOrientation = ReversePort
      PortType = Periodic
      InputType = E
      beta = abs(k)
      E0 = {-sin(phi)*exp(-i*(kx*x+ky*y +kz*z)), cos(phi)*exp(-i*(kx*x+ky*y +kz*z)), 0}
      Eampl = {1, 0, 0}
      Hampl = {-sin(phi), cos(phi), 0}
      alpha1_inc = theta
      alpha2_inc = 0
      pportp1: PeriodicPortReferencePoint on points 2, 8, 104, 110
    port1: Port "Output Port 2" on boundaries 15
      PortName = 2
      PortExcitation = off
      PortSlit = 1
      SlitType = DomainBacked
      PortOrientation = ForwardPort
      PortType = Periodic
      InputType = E
      beta = abs(kg)
      E0 = {-sin(phi)*exp(-i*(kgx*x+kgy*y +kgz*z)), cos(phi)*exp(-i*(kgx*x+kgy*y +kgz*z)), 0}
      Eampl = {1, 0, 0}
      Hampl = {-sin(phi), cos(phi), 0}
      pportp1: PeriodicPortReferencePoint on points 5, 11, 107, 113
    pc1: PeriodicCondition on boundaries 4, 7, 10, 143-145
      PeriodicType = Floquet
      Floquet_source = FromPeriodicPort
      kFloquet = {kx, ky, 0}
      destinationDomains: boundaries 143-145
    pc2: PeriodicCondition on boundaries 5, 8, 11, 18-20
      PeriodicType = Floquet
      Floquet_source = FromPeriodicPort
      kFloquet = {kx, ky, 0}
      destinationDomains: boundaries 18-20
    pc3: PeriodicCondition "Periodic Condition PML 1" on boundaries 1, 13, 142, 146
      PeriodicType = Floquet
      Floquet_source = FromPeriodicPort
      kFloquet = {kx, ky, 0}
      destinationDomains: boundaries 142, 146
    pc4: PeriodicCondition "Periodic Condition PML 2" on boundaries 2, 14, 17, 21
      PeriodicType = Floquet
      Floquet_source = FromPeriodicPort
      kFloquet = {kx, ky, 0}
      destinationDomains: boundaries 17, 21
    sctr1: Scattering "Scattering Boundary Condition 1" on boundaries 3, 16 | Order = SecondOrder

Mesh
  mesh1 "Mesh 1" (physics-controlled)
    size: MeshSizeDefault | hauto = 1

Studies
  std1 "Study 1"
    param: Parametric "Parametric Sweep"
      pname = theta
      plistarr = range(0, 1,89)[deg]
      useaccumtable = on
      accumtable = new
    freq: Frequency "Frequency Domain" | punit = GHz; plist = fre

Solver configurations
  sol1 "Solution 1" (study std1)
    v1: Variables "Dependent Variables 1"
    s1: Stationary "Stationary Solver 1" | stol = 0.01
      p1: Parametric | pname = theta; plistarr = range(0, 1,89)[deg]; pcontinuationmode = no
      fc1: FullyCoupled | linsolver = d1
      d1: Direct "Suggested Direct Solver (ewfd)"

Datasets
  dset1: Solution | solution = sol1

Derived values
  gev1: EvalGlobal "Reflectance, Transmittance, and Absorptance (ewfd)" (disabled)
    data = dset1
    table = new
    expr = {ewfd.Rtotal, ewfd.Ttotal, ewfd.Atotal}
    unit = {1, 1, 1}
    descr = {Total reflectance, Total transmittance, Absorptance}
  int1: IntSurface "Surface Integration 1" on boundaries 15
    data = dset1
    table = tbl1
    expr = ewfd.nPoav
    unit = W
    descr = Power outflow, time average

Tables
  tbl1: Table
    // Surface Integration 1 (ewfd.nPoav)
    theta (rad) | Power outflow, time average (W)
    0 | 0.960503
    0.0174533 | 0.958555
    0.0349066 | 0.954191
    0.0523599 | 0.95162
    0.0698132 | 0.956258
    0.0872665 | 0.962811
    0.10472 | 0.947084
    0.122173 | 0.930557
    0.139626 | 0.949121
    0.15708 | 0.935913
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
Plots
  pg1: PlotGroup3D "Electric Field (ewfd)" | data = dset1
    mslc1: Multislice | expr = ewfd.normE
  pg2: PlotGroup1D "1D Plot Group 2" | data = none
    tblp1: Table "Table Graph 1" | table = tbl1